// SBML level 3 version 2

model Dimerization()

  // Compartments:
  compartment vol = 1;

  // Species:
  species dimer in vol = 0;  // substance in mole
  species monomer in vol = 30/vol;  // substance in mole
  species dimer_1 in vol = 0;  // substance in mole
  species monomer_1 in vol = 30/vol;  // substance in mole

  // Parameters:
  k_c = 0.005;
  k_d = 0.08;
  k_c_1 = 0.005;
  k_d_1 = 0.08;

  // Reactions:
  r_creation: 2 monomer -> dimer; k_c*monomer*(monomer - 1)/vol;
  r_dissociation: dimer -> 2 monomer; k_d*dimer;
  r_creation_1: 2 monomer_1 -> dimer_1; k_c_1*monomer_1*(monomer_1 - 1)/vol;
  r_dissociation_1: dimer_1 -> 2 monomer_1; k_d_1*dimer_1;
end
