// SBML level 3 version 2

model Dimerization()

  // Compartments:
  compartment vol = 1;

  // Species:
  species dimer in vol = 0;  // substance in mole
  species monomer in vol = 30/vol;  // substance in mole
  species dimer_1 in vol = 0;  // substance in mole
  species monomer_1 in vol = 30/vol;  // substance in mole
  species dimer_1_2 in vol = 0;  // substance in mole
  species dimer_2 in vol = 0;  // substance in mole
  species monomer_1_2 in vol = 30/vol;  // substance in mole
  species monomer_2 in vol = 30/vol;  // substance in mole
  species dimer_1_2_3 in vol = 0;  // substance in mole
  species dimer_1_3 in vol = 0;  // substance in mole
  species dimer_2_3 in vol = 0;  // substance in mole
  species dimer_3 in vol = 0;  // substance in mole
  species monomer_1_2_3 in vol = 30/vol;  // substance in mole
  species monomer_1_3 in vol = 30/vol;  // substance in mole
  species monomer_2_3 in vol = 30/vol;  // substance in mole
  species monomer_3 in vol = 30/vol;  // substance in mole
  species dimer_1_2_3_4 in vol = 0;  // substance in mole
  species dimer_1_2_4 in vol = 0;  // substance in mole
  species dimer_1_3_4 in vol = 0;  // substance in mole
  species dimer_1_4 in vol = 0;  // substance in mole
  species dimer_2_3_4 in vol = 0;  // substance in mole
  species dimer_2_4 in vol = 0;  // substance in mole
  species dimer_3_4 in vol = 0;  // substance in mole
  species dimer_4 in vol = 0;  // substance in mole
  species monomer_1_2_3_4 in vol = 30/vol;  // substance in mole
  species monomer_1_2_4 in vol = 30/vol;  // substance in mole
  species monomer_1_3_4 in vol = 30/vol;  // substance in mole
  species monomer_1_4 in vol = 30/vol;  // substance in mole
  species monomer_2_3_4 in vol = 30/vol;  // substance in mole
  species monomer_2_4 in vol = 30/vol;  // substance in mole
  species monomer_3_4 in vol = 30/vol;  // substance in mole
  species monomer_4 in vol = 30/vol;  // substance in mole

  // Parameters:
  k_c = 0.005;
  k_d = 0.08;
  k_c_1 = 0.005;
  k_d_1 = 0.08;
  k_c_1_2 = 0.005;
  k_c_2 = 0.005;
  k_d_1_2 = 0.08;
  k_d_2 = 0.08;
  k_c_1_2_3 = 0.005;
  k_c_1_3 = 0.005;
  k_c_2_3 = 0.005;
  k_c_3 = 0.005;
  k_d_1_2_3 = 0.08;
  k_d_1_3 = 0.08;
  k_d_2_3 = 0.08;
  k_d_3 = 0.08;
  k_c_1_2_3_4 = 0.005;
  k_c_1_2_4 = 0.005;
  k_c_1_3_4 = 0.005;
  k_c_1_4 = 0.005;
  k_c_2_3_4 = 0.005;
  k_c_2_4 = 0.005;
  k_c_3_4 = 0.005;
  k_c_4 = 0.005;
  k_d_1_2_3_4 = 0.08;
  k_d_1_2_4 = 0.08;
  k_d_1_3_4 = 0.08;
  k_d_1_4 = 0.08;
  k_d_2_3_4 = 0.08;
  k_d_2_4 = 0.08;
  k_d_3_4 = 0.08;
  k_d_4 = 0.08;

  // Reactions:
  r_creation: 2 monomer -> dimer; k_c*monomer*(monomer - 1)/vol;
  r_dissociation: dimer -> 2 monomer; k_d*dimer;
  r_creation_1: 2 monomer_1 -> dimer_1; k_c_1*monomer_1*(monomer_1 - 1)/vol;
  r_dissociation_1: dimer_1 -> 2 monomer_1; k_d_1*dimer_1;
  r_creation_1_2: 2 monomer_1_2 -> dimer_1_2; k_c_1_2*monomer_1_2*(monomer_1_2 - 1)/vol;
  r_creation_2: 2 monomer_2 -> dimer_2; k_c_2*monomer_2*(monomer_2 - 1)/vol;
  r_dissociation_1_2: dimer_1_2 -> 2 monomer_1_2; k_d_1_2*dimer_1_2;
  r_dissociation_2: dimer_2 -> 2 monomer_2; k_d_2*dimer_2;
  r_creation_1_2_3: 2 monomer_1_2_3 -> dimer_1_2_3; k_c_1_2_3*monomer_1_2_3*(monomer_1_2_3 - 1)/vol;
  r_creation_1_3: 2 monomer_1_3 -> dimer_1_3; k_c_1_3*monomer_1_3*(monomer_1_3 - 1)/vol;
  r_creation_2_3: 2 monomer_2_3 -> dimer_2_3; k_c_2_3*monomer_2_3*(monomer_2_3 - 1)/vol;
  r_creation_3: 2 monomer_3 -> dimer_3; k_c_3*monomer_3*(monomer_3 - 1)/vol;
  r_dissociation_1_2_3: dimer_1_2_3 -> 2 monomer_1_2_3; k_d_1_2_3*dimer_1_2_3;
  r_dissociation_1_3: dimer_1_3 -> 2 monomer_1_3; k_d_1_3*dimer_1_3;
  r_dissociation_2_3: dimer_2_3 -> 2 monomer_2_3; k_d_2_3*dimer_2_3;
  r_dissociation_3: dimer_3 -> 2 monomer_3; k_d_3*dimer_3;
  r_creation_1_2_3_4: 2 monomer_1_2_3_4 -> dimer_1_2_3_4; k_c_1_2_3_4*monomer_1_2_3_4*(monomer_1_2_3_4 - 1)/vol;
  r_creation_1_2_4: 2 monomer_1_2_4 -> dimer_1_2_4; k_c_1_2_4*monomer_1_2_4*(monomer_1_2_4 - 1)/vol;
  r_creation_1_3_4: 2 monomer_1_3_4 -> dimer_1_3_4; k_c_1_3_4*monomer_1_3_4*(monomer_1_3_4 - 1)/vol;
  r_creation_1_4: 2 monomer_1_4 -> dimer_1_4; k_c_1_4*monomer_1_4*(monomer_1_4 - 1)/vol;
  r_creation_2_3_4: 2 monomer_2_3_4 -> dimer_2_3_4; k_c_2_3_4*monomer_2_3_4*(monomer_2_3_4 - 1)/vol;
  r_creation_2_4: 2 monomer_2_4 -> dimer_2_4; k_c_2_4*monomer_2_4*(monomer_2_4 - 1)/vol;
  r_creation_3_4: 2 monomer_3_4 -> dimer_3_4; k_c_3_4*monomer_3_4*(monomer_3_4 - 1)/vol;
  r_creation_4: 2 monomer_4 -> dimer_4; k_c_4*monomer_4*(monomer_4 - 1)/vol;
  r_dissociation_1_2_3_4: dimer_1_2_3_4 -> 2 monomer_1_2_3_4; k_d_1_2_3_4*dimer_1_2_3_4;
  r_dissociation_1_2_4: dimer_1_2_4 -> 2 monomer_1_2_4; k_d_1_2_4*dimer_1_2_4;
  r_dissociation_1_3_4: dimer_1_3_4 -> 2 monomer_1_3_4; k_d_1_3_4*dimer_1_3_4;
  r_dissociation_1_4: dimer_1_4 -> 2 monomer_1_4; k_d_1_4*dimer_1_4;
  r_dissociation_2_3_4: dimer_2_3_4 -> 2 monomer_2_3_4; k_d_2_3_4*dimer_2_3_4;
  r_dissociation_2_4: dimer_2_4 -> 2 monomer_2_4; k_d_2_4*dimer_2_4;
  r_dissociation_3_4: dimer_3_4 -> 2 monomer_3_4; k_d_3_4*dimer_3_4;
  r_dissociation_4: dimer_4 -> 2 monomer_4; k_d_4*dimer_4;
end
