// SBML level 3 version 2

model Michaelis_Menten()

  // Compartments:
  compartment vol = 1;

  // Species:
  species A in vol = 301/vol;  // substance in mole
  species B in vol = 120/vol;  // substance in mole
  species C in vol = 0;  // substance in mole
  species D in vol = 0;  // substance in mole
  species A_1 in vol = 301/vol;  // substance in mole
  species B_1 in vol = 120/vol;  // substance in mole
  species C_1 in vol = 0;  // substance in mole
  species D_1 in vol = 0;  // substance in mole
  species A_1_2 in vol = 301/vol;  // substance in mole
  species A_2 in vol = 301/vol;  // substance in mole
  species B_1_2 in vol = 120/vol;  // substance in mole
  species B_2 in vol = 120/vol;  // substance in mole
  species C_1_2 in vol = 0;  // substance in mole
  species C_2 in vol = 0;  // substance in mole
  species D_1_2 in vol = 0;  // substance in mole
  species D_2 in vol = 0;  // substance in mole
  species A_1_2_3 in vol = 301/vol;  // substance in mole
  species A_1_3 in vol = 301/vol;  // substance in mole
  species A_2_3 in vol = 301/vol;  // substance in mole
  species A_3 in vol = 301/vol;  // substance in mole
  species B_1_2_3 in vol = 120/vol;  // substance in mole
  species B_1_3 in vol = 120/vol;  // substance in mole
  species B_2_3 in vol = 120/vol;  // substance in mole
  species B_3 in vol = 120/vol;  // substance in mole
  species C_1_2_3 in vol = 0;  // substance in mole
  species C_1_3 in vol = 0;  // substance in mole
  species C_2_3 in vol = 0;  // substance in mole
  species C_3 in vol = 0;  // substance in mole
  species D_1_2_3 in vol = 0;  // substance in mole
  species D_1_3 in vol = 0;  // substance in mole
  species D_2_3 in vol = 0;  // substance in mole
  species D_3 in vol = 0;  // substance in mole
  species A_1_2_3_4 in vol = 301/vol;  // substance in mole
  species A_1_2_4 in vol = 301/vol;  // substance in mole
  species A_1_3_4 in vol = 301/vol;  // substance in mole
  species A_1_4 in vol = 301/vol;  // substance in mole
  species A_2_3_4 in vol = 301/vol;  // substance in mole
  species A_2_4 in vol = 301/vol;  // substance in mole
  species A_3_4 in vol = 301/vol;  // substance in mole
  species A_4 in vol = 301/vol;  // substance in mole
  species B_1_2_3_4 in vol = 120/vol;  // substance in mole
  species B_1_2_4 in vol = 120/vol;  // substance in mole
  species B_1_3_4 in vol = 120/vol;  // substance in mole
  species B_1_4 in vol = 120/vol;  // substance in mole
  species B_2_3_4 in vol = 120/vol;  // substance in mole
  species B_2_4 in vol = 120/vol;  // substance in mole
  species B_3_4 in vol = 120/vol;  // substance in mole
  species B_4 in vol = 120/vol;  // substance in mole
  species C_1_2_3_4 in vol = 0;  // substance in mole
  species C_1_2_4 in vol = 0;  // substance in mole
  species C_1_3_4 in vol = 0;  // substance in mole
  species C_1_4 in vol = 0;  // substance in mole
  species C_2_3_4 in vol = 0;  // substance in mole
  species C_2_4 in vol = 0;  // substance in mole
  species C_3_4 in vol = 0;  // substance in mole
  species C_4 in vol = 0;  // substance in mole
  species D_1_2_3_4 in vol = 0;  // substance in mole
  species D_1_2_4 in vol = 0;  // substance in mole
  species D_1_3_4 in vol = 0;  // substance in mole
  species D_1_4 in vol = 0;  // substance in mole
  species D_2_3_4 in vol = 0;  // substance in mole
  species D_2_4 in vol = 0;  // substance in mole
  species D_3_4 in vol = 0;  // substance in mole
  species D_4 in vol = 0;  // substance in mole

  // Parameters:
  rate1 = 0.0017;
  rate2 = 0.5;
  rate3 = 0.1;
  rate1_1 = 0.0017;
  rate2_1 = 0.5;
  rate3_1 = 0.1;
  rate1_1_2 = 0.0017;
  rate1_2 = 0.0017;
  rate2_1_2 = 0.5;
  rate2_2 = 0.5;
  rate3_1_2 = 0.1;
  rate3_2 = 0.1;
  rate1_1_2_3 = 0.0017;
  rate1_1_3 = 0.0017;
  rate1_2_3 = 0.0017;
  rate1_3 = 0.0017;
  rate2_1_2_3 = 0.5;
  rate2_1_3 = 0.5;
  rate2_2_3 = 0.5;
  rate2_3 = 0.5;
  rate3_1_2_3 = 0.1;
  rate3_1_3 = 0.1;
  rate3_2_3 = 0.1;
  rate3_3 = 0.1;
  rate1_1_2_3_4 = 0.0017;
  rate1_1_2_4 = 0.0017;
  rate1_1_3_4 = 0.0017;
  rate1_1_4 = 0.0017;
  rate1_2_3_4 = 0.0017;
  rate1_2_4 = 0.0017;
  rate1_3_4 = 0.0017;
  rate1_4 = 0.0017;
  rate2_1_2_3_4 = 0.5;
  rate2_1_2_4 = 0.5;
  rate2_1_3_4 = 0.5;
  rate2_1_4 = 0.5;
  rate2_2_3_4 = 0.5;
  rate2_2_4 = 0.5;
  rate2_3_4 = 0.5;
  rate2_4 = 0.5;
  rate3_1_2_3_4 = 0.1;
  rate3_1_2_4 = 0.1;
  rate3_1_3_4 = 0.1;
  rate3_1_4 = 0.1;
  rate3_2_3_4 = 0.1;
  rate3_2_4 = 0.1;
  rate3_3_4 = 0.1;
  rate3_4 = 0.1;

  // Reactions:
  r1: A + B -> C; rate1*A*B/vol;
  r2: C -> A + B; rate2*C;
  r3: C -> B + D; rate3*C;
  r1_1: A_1 + B_1 -> C_1; rate1_1*A_1*B_1/vol;
  r2_1: C_1 -> A_1 + B_1; rate2_1*C_1;
  r3_1: C_1 -> B_1 + D_1; rate3_1*C_1;
  r1_1_2: A_1_2 + B_1_2 -> C_1_2; rate1_1_2*A_1_2*B_1_2/vol;
  r1_2: A_2 + B_2 -> C_2; rate1_2*A_2*B_2/vol;
  r2_1_2: C_1_2 -> A_1_2 + B_1_2; rate2_1_2*C_1_2;
  r2_2: C_2 -> A_2 + B_2; rate2_2*C_2;
  r3_1_2: C_1_2 -> B_1_2 + D_1_2; rate3_1_2*C_1_2;
  r3_2: C_2 -> B_2 + D_2; rate3_2*C_2;
  r1_1_2_3: A_1_2_3 + B_1_2_3 -> C_1_2_3; rate1_1_2_3*A_1_2_3*B_1_2_3/vol;
  r1_1_3: A_1_3 + B_1_3 -> C_1_3; rate1_1_3*A_1_3*B_1_3/vol;
  r1_2_3: A_2_3 + B_2_3 -> C_2_3; rate1_2_3*A_2_3*B_2_3/vol;
  r1_3: A_3 + B_3 -> C_3; rate1_3*A_3*B_3/vol;
  r2_1_2_3: C_1_2_3 -> A_1_2_3 + B_1_2_3; rate2_1_2_3*C_1_2_3;
  r2_1_3: C_1_3 -> A_1_3 + B_1_3; rate2_1_3*C_1_3;
  r2_2_3: C_2_3 -> A_2_3 + B_2_3; rate2_2_3*C_2_3;
  r2_3: C_3 -> A_3 + B_3; rate2_3*C_3;
  r3_1_2_3: C_1_2_3 -> B_1_2_3 + D_1_2_3; rate3_1_2_3*C_1_2_3;
  r3_1_3: C_1_3 -> B_1_3 + D_1_3; rate3_1_3*C_1_3;
  r3_2_3: C_2_3 -> B_2_3 + D_2_3; rate3_2_3*C_2_3;
  r3_3: C_3 -> B_3 + D_3; rate3_3*C_3;
  r1_1_2_3_4: A_1_2_3_4 + B_1_2_3_4 -> C_1_2_3_4; rate1_1_2_3_4*A_1_2_3_4*B_1_2_3_4/vol;
  r1_1_2_4: A_1_2_4 + B_1_2_4 -> C_1_2_4; rate1_1_2_4*A_1_2_4*B_1_2_4/vol;
  r1_1_3_4: A_1_3_4 + B_1_3_4 -> C_1_3_4; rate1_1_3_4*A_1_3_4*B_1_3_4/vol;
  r1_1_4: A_1_4 + B_1_4 -> C_1_4; rate1_1_4*A_1_4*B_1_4/vol;
  r1_2_3_4: A_2_3_4 + B_2_3_4 -> C_2_3_4; rate1_2_3_4*A_2_3_4*B_2_3_4/vol;
  r1_2_4: A_2_4 + B_2_4 -> C_2_4; rate1_2_4*A_2_4*B_2_4/vol;
  r1_3_4: A_3_4 + B_3_4 -> C_3_4; rate1_3_4*A_3_4*B_3_4/vol;
  r1_4: A_4 + B_4 -> C_4; rate1_4*A_4*B_4/vol;
  r2_1_2_3_4: C_1_2_3_4 -> A_1_2_3_4 + B_1_2_3_4; rate2_1_2_3_4*C_1_2_3_4;
  r2_1_2_4: C_1_2_4 -> A_1_2_4 + B_1_2_4; rate2_1_2_4*C_1_2_4;
  r2_1_3_4: C_1_3_4 -> A_1_3_4 + B_1_3_4; rate2_1_3_4*C_1_3_4;
  r2_1_4: C_1_4 -> A_1_4 + B_1_4; rate2_1_4*C_1_4;
  r2_2_3_4: C_2_3_4 -> A_2_3_4 + B_2_3_4; rate2_2_3_4*C_2_3_4;
  r2_2_4: C_2_4 -> A_2_4 + B_2_4; rate2_2_4*C_2_4;
  r2_3_4: C_3_4 -> A_3_4 + B_3_4; rate2_3_4*C_3_4;
  r2_4: C_4 -> A_4 + B_4; rate2_4*C_4;
  r3_1_2_3_4: C_1_2_3_4 -> B_1_2_3_4 + D_1_2_3_4; rate3_1_2_3_4*C_1_2_3_4;
  r3_1_2_4: C_1_2_4 -> B_1_2_4 + D_1_2_4; rate3_1_2_4*C_1_2_4;
  r3_1_3_4: C_1_3_4 -> B_1_3_4 + D_1_3_4; rate3_1_3_4*C_1_3_4;
  r3_1_4: C_1_4 -> B_1_4 + D_1_4; rate3_1_4*C_1_4;
  r3_2_3_4: C_2_3_4 -> B_2_3_4 + D_2_3_4; rate3_2_3_4*C_2_3_4;
  r3_2_4: C_2_4 -> B_2_4 + D_2_4; rate3_2_4*C_2_4;
  r3_3_4: C_3_4 -> B_3_4 + D_3_4; rate3_3_4*C_3_4;
  r3_4: C_4 -> B_4 + D_4; rate3_4*C_4;
end
