// SBML level 3 version 2

model VilarOscillator()

  // Compartments:
  compartment vol = 1;

  // Species:
  species A in vol = 10/vol;  // substance in mole
  species C in vol = 10/vol;  // substance in mole
  species Da in vol = 1/vol;  // substance in mole
  species Da_prime in vol = 0;  // substance in mole
  species Dr in vol = 1/vol;  // substance in mole
  species Dr_prime in vol = 0;  // substance in mole
  species Ma in vol = 0;  // substance in mole
  species Mr in vol = 0;  // substance in mole
  species R in vol = 10/vol;  // substance in mole

  // Parameters:
  Theta_a = 50;
  Theta_r = 100;
  alpha_a = 50;
  alpha_a_prime = 500;
  alpha_r = 0.01;
  alpha_r_prime = 50;
  beta_a = 50;
  beta_r = 5;
  delta_a = 1;
  delta_ma = 10;
  delta_mr = 0.5;
  delta_r = 0.2;
  gamma_a = 1;
  gamma_c = 2;
  gamma_r = 1;

  // Reactions:
  S_A2: Da_prime -> Da_prime + A; Theta_a*Da_prime;
  S_A3: Dr_prime -> Dr_prime + A; Theta_a*Dr_prime;
  S_Mr1: Dr_prime -> Dr_prime + Mr; alpha_r_prime*Dr_prime;
  S_Mr2: Dr -> Dr + Mr; alpha_r*Dr;
  a_A: A -> ; gamma_c*A;
  a_Ma: Ma -> ; delta_ma*Ma;
  a_Mr: Mr -> ; delta_mr*Mr;
  a_R: R -> ; delta_r*R;
  s_A1: Ma -> A + Ma; beta_a*Ma;
  s_C: A + R -> C; gamma_c*A*R/vol;
  s_Da: Da_prime -> Da; Theta_a*Da_prime;
  s_Da_prime: Da + A -> Da_prime; gamma_a*A*Da/vol;
  s_Dr: Dr_prime -> Dr; Theta_r*Dr_prime;
  s_Dr_prime: Dr + A -> Dr_prime; gamma_r*A*Dr/vol;
  s_Ma1: Da_prime -> Da_prime + Ma; alpha_a_prime*Da_prime;
  s_Ma2: Da -> Da + Ma; alpha_a*Da;
  s_R1: Mr -> Mr + R; beta_r*Mr;
  s_r2: C -> R; delta_a*C;
end
