// SBML level 3 version 2

model VilarOscillator()

  // Compartments:
  compartment vol = 1;

  // Species:
  species A in vol = 10/vol;  // substance in mole
  species C in vol = 10/vol;  // substance in mole
  species Da in vol = 1/vol;  // substance in mole
  species Da_prime in vol = 0;  // substance in mole
  species Dr in vol = 1/vol;  // substance in mole
  species Dr_prime in vol = 0;  // substance in mole
  species Ma in vol = 0;  // substance in mole
  species Mr in vol = 0;  // substance in mole
  species R in vol = 10/vol;  // substance in mole
  species A_1 in vol = 10/vol;  // substance in mole
  species C_1 in vol = 10/vol;  // substance in mole
  species Da_1 in vol = 1/vol;  // substance in mole
  species Da_prime_1 in vol = 0;  // substance in mole
  species Dr_1 in vol = 1/vol;  // substance in mole
  species Dr_prime_1 in vol = 0;  // substance in mole
  species Ma_1 in vol = 0;  // substance in mole
  species Mr_1 in vol = 0;  // substance in mole
  species R_1 in vol = 10/vol;  // substance in mole

  // Parameters:
  Theta_a = 50;
  Theta_r = 100;
  alpha_a = 50;
  alpha_a_prime = 500;
  alpha_r = 0.01;
  alpha_r_prime = 50;
  beta_a = 50;
  beta_r = 5;
  delta_a = 1;
  delta_ma = 10;
  delta_mr = 0.5;
  delta_r = 0.2;
  gamma_a = 1;
  gamma_c = 2;
  gamma_r = 1;
  Theta_a_1 = 50;
  Theta_r_1 = 100;
  alpha_a_1 = 50;
  alpha_a_prime_1 = 500;
  alpha_r_1 = 0.01;
  alpha_r_prime_1 = 50;
  beta_a_1 = 50;
  beta_r_1 = 5;
  delta_a_1 = 1;
  delta_ma_1 = 10;
  delta_mr_1 = 0.5;
  delta_r_1 = 0.2;
  gamma_a_1 = 1;
  gamma_c_1 = 2;
  gamma_r_1 = 1;

  // Reactions:
  S_A2: Da_prime -> Da_prime + A; Theta_a*Da_prime;
  S_A3: Dr_prime -> Dr_prime + A; Theta_a*Dr_prime;
  S_Mr1: Dr_prime -> Dr_prime + Mr; alpha_r_prime*Dr_prime;
  S_Mr2: Dr -> Dr + Mr; alpha_r*Dr;
  a_A: A -> ; gamma_c*A;
  a_Ma: Ma -> ; delta_ma*Ma;
  a_Mr: Mr -> ; delta_mr*Mr;
  a_R: R -> ; delta_r*R;
  s_A1: Ma -> A + Ma; beta_a*Ma;
  s_C: A + R -> C; gamma_c*A*R/vol;
  s_Da: Da_prime -> Da; Theta_a*Da_prime;
  s_Da_prime: Da + A -> Da_prime; gamma_a*A*Da/vol;
  s_Dr: Dr_prime -> Dr; Theta_r*Dr_prime;
  s_Dr_prime: Dr + A -> Dr_prime; gamma_r*A*Dr/vol;
  s_Ma1: Da_prime -> Da_prime + Ma; alpha_a_prime*Da_prime;
  s_Ma2: Da -> Da + Ma; alpha_a*Da;
  s_R1: Mr -> Mr + R; beta_r*Mr;
  s_r2: C -> R; delta_a*C;
  S_A2_1: Da_prime_1 -> Da_prime_1 + A_1; Theta_a_1*Da_prime_1;
  S_A3_1: Dr_prime_1 -> Dr_prime_1 + A_1; Theta_a_1*Dr_prime_1;
  S_Mr1_1: Dr_prime_1 -> Dr_prime_1 + Mr_1; alpha_r_prime_1*Dr_prime_1;
  S_Mr2_1: Dr_1 -> Dr_1 + Mr_1; alpha_r_1*Dr_1;
  a_A_1: A_1 -> ; gamma_c_1*A_1;
  a_Ma_1: Ma_1 -> ; delta_ma_1*Ma_1;
  a_Mr_1: Mr_1 -> ; delta_mr_1*Mr_1;
  a_R_1: R_1 -> ; delta_r_1*R_1;
  s_A1_1: Ma_1 -> A_1 + Ma_1; beta_a_1*Ma_1;
  s_C_1: A_1 + R_1 -> C_1; gamma_c_1*A_1*R_1/vol;
  s_Da_1: Da_prime_1 -> Da_1; Theta_a_1*Da_prime_1;
  s_Da_prime_1: Da_1 + A_1 -> Da_prime_1; gamma_a_1*A_1*Da_1/vol;
  s_Dr_1: Dr_prime_1 -> Dr_1; Theta_r_1*Dr_prime_1;
  s_Dr_prime_1: Dr_1 + A_1 -> Dr_prime_1; gamma_r_1*A_1*Dr_1/vol;
  s_Ma1_1: Da_prime_1 -> Da_prime_1 + Ma_1; alpha_a_prime_1*Da_prime_1;
  s_Ma2_1: Da_1 -> Da_1 + Ma_1; alpha_a_1*Da_1;
  s_R1_1: Mr_1 -> Mr_1 + R_1; beta_r_1*Mr_1;
  s_r2_1: C_1 -> R_1; delta_a_1*C_1;
end
