// SBML level 3 version 2

model VilarOscillator()

  // Compartments:
  compartment vol = 1;

  // Species:
  species A in vol = 10/vol;  // substance in mole
  species C in vol = 10/vol;  // substance in mole
  species Da in vol = 1/vol;  // substance in mole
  species Da_prime in vol = 0;  // substance in mole
  species Dr in vol = 1/vol;  // substance in mole
  species Dr_prime in vol = 0;  // substance in mole
  species Ma in vol = 0;  // substance in mole
  species Mr in vol = 0;  // substance in mole
  species R in vol = 10/vol;  // substance in mole
  species A_1 in vol = 10/vol;  // substance in mole
  species C_1 in vol = 10/vol;  // substance in mole
  species Da_1 in vol = 1/vol;  // substance in mole
  species Da_prime_1 in vol = 0;  // substance in mole
  species Dr_1 in vol = 1/vol;  // substance in mole
  species Dr_prime_1 in vol = 0;  // substance in mole
  species Ma_1 in vol = 0;  // substance in mole
  species Mr_1 in vol = 0;  // substance in mole
  species R_1 in vol = 10/vol;  // substance in mole
  species A_1_2 in vol = 10/vol;  // substance in mole
  species A_2 in vol = 10/vol;  // substance in mole
  species C_1_2 in vol = 10/vol;  // substance in mole
  species C_2 in vol = 10/vol;  // substance in mole
  species Da_1_2 in vol = 1/vol;  // substance in mole
  species Da_2 in vol = 1/vol;  // substance in mole
  species Da_prime_1_2 in vol = 0;  // substance in mole
  species Da_prime_2 in vol = 0;  // substance in mole
  species Dr_1_2 in vol = 1/vol;  // substance in mole
  species Dr_2 in vol = 1/vol;  // substance in mole
  species Dr_prime_1_2 in vol = 0;  // substance in mole
  species Dr_prime_2 in vol = 0;  // substance in mole
  species Ma_1_2 in vol = 0;  // substance in mole
  species Ma_2 in vol = 0;  // substance in mole
  species Mr_1_2 in vol = 0;  // substance in mole
  species Mr_2 in vol = 0;  // substance in mole
  species R_1_2 in vol = 10/vol;  // substance in mole
  species R_2 in vol = 10/vol;  // substance in mole
  species A_1_2_3 in vol = 10/vol;  // substance in mole
  species A_1_3 in vol = 10/vol;  // substance in mole
  species A_2_3 in vol = 10/vol;  // substance in mole
  species A_3 in vol = 10/vol;  // substance in mole
  species C_1_2_3 in vol = 10/vol;  // substance in mole
  species C_1_3 in vol = 10/vol;  // substance in mole
  species C_2_3 in vol = 10/vol;  // substance in mole
  species C_3 in vol = 10/vol;  // substance in mole
  species Da_1_2_3 in vol = 1/vol;  // substance in mole
  species Da_1_3 in vol = 1/vol;  // substance in mole
  species Da_2_3 in vol = 1/vol;  // substance in mole
  species Da_3 in vol = 1/vol;  // substance in mole
  species Da_prime_1_2_3 in vol = 0;  // substance in mole
  species Da_prime_1_3 in vol = 0;  // substance in mole
  species Da_prime_2_3 in vol = 0;  // substance in mole
  species Da_prime_3 in vol = 0;  // substance in mole
  species Dr_1_2_3 in vol = 1/vol;  // substance in mole
  species Dr_1_3 in vol = 1/vol;  // substance in mole
  species Dr_2_3 in vol = 1/vol;  // substance in mole
  species Dr_3 in vol = 1/vol;  // substance in mole
  species Dr_prime_1_2_3 in vol = 0;  // substance in mole
  species Dr_prime_1_3 in vol = 0;  // substance in mole
  species Dr_prime_2_3 in vol = 0;  // substance in mole
  species Dr_prime_3 in vol = 0;  // substance in mole
  species Ma_1_2_3 in vol = 0;  // substance in mole
  species Ma_1_3 in vol = 0;  // substance in mole
  species Ma_2_3 in vol = 0;  // substance in mole
  species Ma_3 in vol = 0;  // substance in mole
  species Mr_1_2_3 in vol = 0;  // substance in mole
  species Mr_1_3 in vol = 0;  // substance in mole
  species Mr_2_3 in vol = 0;  // substance in mole
  species Mr_3 in vol = 0;  // substance in mole
  species R_1_2_3 in vol = 10/vol;  // substance in mole
  species R_1_3 in vol = 10/vol;  // substance in mole
  species R_2_3 in vol = 10/vol;  // substance in mole
  species R_3 in vol = 10/vol;  // substance in mole
  species A_1_2_3_4 in vol = 10/vol;  // substance in mole
  species A_1_2_4 in vol = 10/vol;  // substance in mole
  species A_1_3_4 in vol = 10/vol;  // substance in mole
  species A_1_4 in vol = 10/vol;  // substance in mole
  species A_2_3_4 in vol = 10/vol;  // substance in mole
  species A_2_4 in vol = 10/vol;  // substance in mole
  species A_3_4 in vol = 10/vol;  // substance in mole
  species A_4 in vol = 10/vol;  // substance in mole
  species C_1_2_3_4 in vol = 10/vol;  // substance in mole
  species C_1_2_4 in vol = 10/vol;  // substance in mole
  species C_1_3_4 in vol = 10/vol;  // substance in mole
  species C_1_4 in vol = 10/vol;  // substance in mole
  species C_2_3_4 in vol = 10/vol;  // substance in mole
  species C_2_4 in vol = 10/vol;  // substance in mole
  species C_3_4 in vol = 10/vol;  // substance in mole
  species C_4 in vol = 10/vol;  // substance in mole
  species Da_1_2_3_4 in vol = 1/vol;  // substance in mole
  species Da_1_2_4 in vol = 1/vol;  // substance in mole
  species Da_1_3_4 in vol = 1/vol;  // substance in mole
  species Da_1_4 in vol = 1/vol;  // substance in mole
  species Da_2_3_4 in vol = 1/vol;  // substance in mole
  species Da_2_4 in vol = 1/vol;  // substance in mole
  species Da_3_4 in vol = 1/vol;  // substance in mole
  species Da_4 in vol = 1/vol;  // substance in mole
  species Da_prime_1_2_3_4 in vol = 0;  // substance in mole
  species Da_prime_1_2_4 in vol = 0;  // substance in mole
  species Da_prime_1_3_4 in vol = 0;  // substance in mole
  species Da_prime_1_4 in vol = 0;  // substance in mole
  species Da_prime_2_3_4 in vol = 0;  // substance in mole
  species Da_prime_2_4 in vol = 0;  // substance in mole
  species Da_prime_3_4 in vol = 0;  // substance in mole
  species Da_prime_4 in vol = 0;  // substance in mole
  species Dr_1_2_3_4 in vol = 1/vol;  // substance in mole
  species Dr_1_2_4 in vol = 1/vol;  // substance in mole
  species Dr_1_3_4 in vol = 1/vol;  // substance in mole
  species Dr_1_4 in vol = 1/vol;  // substance in mole
  species Dr_2_3_4 in vol = 1/vol;  // substance in mole
  species Dr_2_4 in vol = 1/vol;  // substance in mole
  species Dr_3_4 in vol = 1/vol;  // substance in mole
  species Dr_4 in vol = 1/vol;  // substance in mole
  species Dr_prime_1_2_3_4 in vol = 0;  // substance in mole
  species Dr_prime_1_2_4 in vol = 0;  // substance in mole
  species Dr_prime_1_3_4 in vol = 0;  // substance in mole
  species Dr_prime_1_4 in vol = 0;  // substance in mole
  species Dr_prime_2_3_4 in vol = 0;  // substance in mole
  species Dr_prime_2_4 in vol = 0;  // substance in mole
  species Dr_prime_3_4 in vol = 0;  // substance in mole
  species Dr_prime_4 in vol = 0;  // substance in mole
  species Ma_1_2_3_4 in vol = 0;  // substance in mole
  species Ma_1_2_4 in vol = 0;  // substance in mole
  species Ma_1_3_4 in vol = 0;  // substance in mole
  species Ma_1_4 in vol = 0;  // substance in mole
  species Ma_2_3_4 in vol = 0;  // substance in mole
  species Ma_2_4 in vol = 0;  // substance in mole
  species Ma_3_4 in vol = 0;  // substance in mole
  species Ma_4 in vol = 0;  // substance in mole
  species Mr_1_2_3_4 in vol = 0;  // substance in mole
  species Mr_1_2_4 in vol = 0;  // substance in mole
  species Mr_1_3_4 in vol = 0;  // substance in mole
  species Mr_1_4 in vol = 0;  // substance in mole
  species Mr_2_3_4 in vol = 0;  // substance in mole
  species Mr_2_4 in vol = 0;  // substance in mole
  species Mr_3_4 in vol = 0;  // substance in mole
  species Mr_4 in vol = 0;  // substance in mole
  species R_1_2_3_4 in vol = 10/vol;  // substance in mole
  species R_1_2_4 in vol = 10/vol;  // substance in mole
  species R_1_3_4 in vol = 10/vol;  // substance in mole
  species R_1_4 in vol = 10/vol;  // substance in mole
  species R_2_3_4 in vol = 10/vol;  // substance in mole
  species R_2_4 in vol = 10/vol;  // substance in mole
  species R_3_4 in vol = 10/vol;  // substance in mole
  species R_4 in vol = 10/vol;  // substance in mole

  // Parameters:
  Theta_a = 50;
  Theta_r = 100;
  alpha_a = 50;
  alpha_a_prime = 500;
  alpha_r = 0.01;
  alpha_r_prime = 50;
  beta_a = 50;
  beta_r = 5;
  delta_a = 1;
  delta_ma = 10;
  delta_mr = 0.5;
  delta_r = 0.2;
  gamma_a = 1;
  gamma_c = 2;
  gamma_r = 1;
  Theta_a_1 = 50;
  Theta_r_1 = 100;
  alpha_a_1 = 50;
  alpha_a_prime_1 = 500;
  alpha_r_1 = 0.01;
  alpha_r_prime_1 = 50;
  beta_a_1 = 50;
  beta_r_1 = 5;
  delta_a_1 = 1;
  delta_ma_1 = 10;
  delta_mr_1 = 0.5;
  delta_r_1 = 0.2;
  gamma_a_1 = 1;
  gamma_c_1 = 2;
  gamma_r_1 = 1;
  Theta_a_1_2 = 50;
  Theta_a_2 = 50;
  Theta_r_1_2 = 100;
  Theta_r_2 = 100;
  alpha_a_1_2 = 50;
  alpha_a_2 = 50;
  alpha_a_prime_1_2 = 500;
  alpha_a_prime_2 = 500;
  alpha_r_1_2 = 0.01;
  alpha_r_2 = 0.01;
  alpha_r_prime_1_2 = 50;
  alpha_r_prime_2 = 50;
  beta_a_1_2 = 50;
  beta_a_2 = 50;
  beta_r_1_2 = 5;
  beta_r_2 = 5;
  delta_a_1_2 = 1;
  delta_a_2 = 1;
  delta_ma_1_2 = 10;
  delta_ma_2 = 10;
  delta_mr_1_2 = 0.5;
  delta_mr_2 = 0.5;
  delta_r_1_2 = 0.2;
  delta_r_2 = 0.2;
  gamma_a_1_2 = 1;
  gamma_a_2 = 1;
  gamma_c_1_2 = 2;
  gamma_c_2 = 2;
  gamma_r_1_2 = 1;
  gamma_r_2 = 1;
  Theta_a_1_2_3 = 50;
  Theta_a_1_3 = 50;
  Theta_a_2_3 = 50;
  Theta_a_3 = 50;
  Theta_r_1_2_3 = 100;
  Theta_r_1_3 = 100;
  Theta_r_2_3 = 100;
  Theta_r_3 = 100;
  alpha_a_1_2_3 = 50;
  alpha_a_1_3 = 50;
  alpha_a_2_3 = 50;
  alpha_a_3 = 50;
  alpha_a_prime_1_2_3 = 500;
  alpha_a_prime_1_3 = 500;
  alpha_a_prime_2_3 = 500;
  alpha_a_prime_3 = 500;
  alpha_r_1_2_3 = 0.01;
  alpha_r_1_3 = 0.01;
  alpha_r_2_3 = 0.01;
  alpha_r_3 = 0.01;
  alpha_r_prime_1_2_3 = 50;
  alpha_r_prime_1_3 = 50;
  alpha_r_prime_2_3 = 50;
  alpha_r_prime_3 = 50;
  beta_a_1_2_3 = 50;
  beta_a_1_3 = 50;
  beta_a_2_3 = 50;
  beta_a_3 = 50;
  beta_r_1_2_3 = 5;
  beta_r_1_3 = 5;
  beta_r_2_3 = 5;
  beta_r_3 = 5;
  delta_a_1_2_3 = 1;
  delta_a_1_3 = 1;
  delta_a_2_3 = 1;
  delta_a_3 = 1;
  delta_ma_1_2_3 = 10;
  delta_ma_1_3 = 10;
  delta_ma_2_3 = 10;
  delta_ma_3 = 10;
  delta_mr_1_2_3 = 0.5;
  delta_mr_1_3 = 0.5;
  delta_mr_2_3 = 0.5;
  delta_mr_3 = 0.5;
  delta_r_1_2_3 = 0.2;
  delta_r_1_3 = 0.2;
  delta_r_2_3 = 0.2;
  delta_r_3 = 0.2;
  gamma_a_1_2_3 = 1;
  gamma_a_1_3 = 1;
  gamma_a_2_3 = 1;
  gamma_a_3 = 1;
  gamma_c_1_2_3 = 2;
  gamma_c_1_3 = 2;
  gamma_c_2_3 = 2;
  gamma_c_3 = 2;
  gamma_r_1_2_3 = 1;
  gamma_r_1_3 = 1;
  gamma_r_2_3 = 1;
  gamma_r_3 = 1;
  Theta_a_1_2_3_4 = 50;
  Theta_a_1_2_4 = 50;
  Theta_a_1_3_4 = 50;
  Theta_a_1_4 = 50;
  Theta_a_2_3_4 = 50;
  Theta_a_2_4 = 50;
  Theta_a_3_4 = 50;
  Theta_a_4 = 50;
  Theta_r_1_2_3_4 = 100;
  Theta_r_1_2_4 = 100;
  Theta_r_1_3_4 = 100;
  Theta_r_1_4 = 100;
  Theta_r_2_3_4 = 100;
  Theta_r_2_4 = 100;
  Theta_r_3_4 = 100;
  Theta_r_4 = 100;
  alpha_a_1_2_3_4 = 50;
  alpha_a_1_2_4 = 50;
  alpha_a_1_3_4 = 50;
  alpha_a_1_4 = 50;
  alpha_a_2_3_4 = 50;
  alpha_a_2_4 = 50;
  alpha_a_3_4 = 50;
  alpha_a_4 = 50;
  alpha_a_prime_1_2_3_4 = 500;
  alpha_a_prime_1_2_4 = 500;
  alpha_a_prime_1_3_4 = 500;
  alpha_a_prime_1_4 = 500;
  alpha_a_prime_2_3_4 = 500;
  alpha_a_prime_2_4 = 500;
  alpha_a_prime_3_4 = 500;
  alpha_a_prime_4 = 500;
  alpha_r_1_2_3_4 = 0.01;
  alpha_r_1_2_4 = 0.01;
  alpha_r_1_3_4 = 0.01;
  alpha_r_1_4 = 0.01;
  alpha_r_2_3_4 = 0.01;
  alpha_r_2_4 = 0.01;
  alpha_r_3_4 = 0.01;
  alpha_r_4 = 0.01;
  alpha_r_prime_1_2_3_4 = 50;
  alpha_r_prime_1_2_4 = 50;
  alpha_r_prime_1_3_4 = 50;
  alpha_r_prime_1_4 = 50;
  alpha_r_prime_2_3_4 = 50;
  alpha_r_prime_2_4 = 50;
  alpha_r_prime_3_4 = 50;
  alpha_r_prime_4 = 50;
  beta_a_1_2_3_4 = 50;
  beta_a_1_2_4 = 50;
  beta_a_1_3_4 = 50;
  beta_a_1_4 = 50;
  beta_a_2_3_4 = 50;
  beta_a_2_4 = 50;
  beta_a_3_4 = 50;
  beta_a_4 = 50;
  beta_r_1_2_3_4 = 5;
  beta_r_1_2_4 = 5;
  beta_r_1_3_4 = 5;
  beta_r_1_4 = 5;
  beta_r_2_3_4 = 5;
  beta_r_2_4 = 5;
  beta_r_3_4 = 5;
  beta_r_4 = 5;
  delta_a_1_2_3_4 = 1;
  delta_a_1_2_4 = 1;
  delta_a_1_3_4 = 1;
  delta_a_1_4 = 1;
  delta_a_2_3_4 = 1;
  delta_a_2_4 = 1;
  delta_a_3_4 = 1;
  delta_a_4 = 1;
  delta_ma_1_2_3_4 = 10;
  delta_ma_1_2_4 = 10;
  delta_ma_1_3_4 = 10;
  delta_ma_1_4 = 10;
  delta_ma_2_3_4 = 10;
  delta_ma_2_4 = 10;
  delta_ma_3_4 = 10;
  delta_ma_4 = 10;
  delta_mr_1_2_3_4 = 0.5;
  delta_mr_1_2_4 = 0.5;
  delta_mr_1_3_4 = 0.5;
  delta_mr_1_4 = 0.5;
  delta_mr_2_3_4 = 0.5;
  delta_mr_2_4 = 0.5;
  delta_mr_3_4 = 0.5;
  delta_mr_4 = 0.5;
  delta_r_1_2_3_4 = 0.2;
  delta_r_1_2_4 = 0.2;
  delta_r_1_3_4 = 0.2;
  delta_r_1_4 = 0.2;
  delta_r_2_3_4 = 0.2;
  delta_r_2_4 = 0.2;
  delta_r_3_4 = 0.2;
  delta_r_4 = 0.2;
  gamma_a_1_2_3_4 = 1;
  gamma_a_1_2_4 = 1;
  gamma_a_1_3_4 = 1;
  gamma_a_1_4 = 1;
  gamma_a_2_3_4 = 1;
  gamma_a_2_4 = 1;
  gamma_a_3_4 = 1;
  gamma_a_4 = 1;
  gamma_c_1_2_3_4 = 2;
  gamma_c_1_2_4 = 2;
  gamma_c_1_3_4 = 2;
  gamma_c_1_4 = 2;
  gamma_c_2_3_4 = 2;
  gamma_c_2_4 = 2;
  gamma_c_3_4 = 2;
  gamma_c_4 = 2;
  gamma_r_1_2_3_4 = 1;
  gamma_r_1_2_4 = 1;
  gamma_r_1_3_4 = 1;
  gamma_r_1_4 = 1;
  gamma_r_2_3_4 = 1;
  gamma_r_2_4 = 1;
  gamma_r_3_4 = 1;
  gamma_r_4 = 1;

  // Reactions:
  S_A2: Da_prime -> Da_prime + A; Theta_a*Da_prime;
  S_A3: Dr_prime -> Dr_prime + A; Theta_a*Dr_prime;
  S_Mr1: Dr_prime -> Dr_prime + Mr; alpha_r_prime*Dr_prime;
  S_Mr2: Dr -> Dr + Mr; alpha_r*Dr;
  a_A: A -> ; gamma_c*A;
  a_Ma: Ma -> ; delta_ma*Ma;
  a_Mr: Mr -> ; delta_mr*Mr;
  a_R: R -> ; delta_r*R;
  s_A1: Ma -> A + Ma; beta_a*Ma;
  s_C: A + R -> C; gamma_c*A*R/vol;
  s_Da: Da_prime -> Da; Theta_a*Da_prime;
  s_Da_prime: Da + A -> Da_prime; gamma_a*A*Da/vol;
  s_Dr: Dr_prime -> Dr; Theta_r*Dr_prime;
  s_Dr_prime: Dr + A -> Dr_prime; gamma_r*A*Dr/vol;
  s_Ma1: Da_prime -> Da_prime + Ma; alpha_a_prime*Da_prime;
  s_Ma2: Da -> Da + Ma; alpha_a*Da;
  s_R1: Mr -> Mr + R; beta_r*Mr;
  s_r2: C -> R; delta_a*C;
  S_A2_1: Da_prime_1 -> Da_prime_1 + A_1; Theta_a_1*Da_prime_1;
  S_A3_1: Dr_prime_1 -> Dr_prime_1 + A_1; Theta_a_1*Dr_prime_1;
  S_Mr1_1: Dr_prime_1 -> Dr_prime_1 + Mr_1; alpha_r_prime_1*Dr_prime_1;
  S_Mr2_1: Dr_1 -> Dr_1 + Mr_1; alpha_r_1*Dr_1;
  a_A_1: A_1 -> ; gamma_c_1*A_1;
  a_Ma_1: Ma_1 -> ; delta_ma_1*Ma_1;
  a_Mr_1: Mr_1 -> ; delta_mr_1*Mr_1;
  a_R_1: R_1 -> ; delta_r_1*R_1;
  s_A1_1: Ma_1 -> A_1 + Ma_1; beta_a_1*Ma_1;
  s_C_1: A_1 + R_1 -> C_1; gamma_c_1*A_1*R_1/vol;
  s_Da_1: Da_prime_1 -> Da_1; Theta_a_1*Da_prime_1;
  s_Da_prime_1: Da_1 + A_1 -> Da_prime_1; gamma_a_1*A_1*Da_1/vol;
  s_Dr_1: Dr_prime_1 -> Dr_1; Theta_r_1*Dr_prime_1;
  s_Dr_prime_1: Dr_1 + A_1 -> Dr_prime_1; gamma_r_1*A_1*Dr_1/vol;
  s_Ma1_1: Da_prime_1 -> Da_prime_1 + Ma_1; alpha_a_prime_1*Da_prime_1;
  s_Ma2_1: Da_1 -> Da_1 + Ma_1; alpha_a_1*Da_1;
  s_R1_1: Mr_1 -> Mr_1 + R_1; beta_r_1*Mr_1;
  s_r2_1: C_1 -> R_1; delta_a_1*C_1;
  S_A2_1_2: Da_prime_1_2 -> Da_prime_1_2 + A_1_2; Theta_a_1_2*Da_prime_1_2;
  S_A2_2: Da_prime_2 -> Da_prime_2 + A_2; Theta_a_2*Da_prime_2;
  S_A3_1_2: Dr_prime_1_2 -> Dr_prime_1_2 + A_1_2; Theta_a_1_2*Dr_prime_1_2;
  S_A3_2: Dr_prime_2 -> Dr_prime_2 + A_2; Theta_a_2*Dr_prime_2;
  S_Mr1_1_2: Dr_prime_1_2 -> Dr_prime_1_2 + Mr_1_2; alpha_r_prime_1_2*Dr_prime_1_2;
  S_Mr1_2: Dr_prime_2 -> Dr_prime_2 + Mr_2; alpha_r_prime_2*Dr_prime_2;
  S_Mr2_1_2: Dr_1_2 -> Dr_1_2 + Mr_1_2; alpha_r_1_2*Dr_1_2;
  S_Mr2_2: Dr_2 -> Dr_2 + Mr_2; alpha_r_2*Dr_2;
  a_A_1_2: A_1_2 -> ; gamma_c_1_2*A_1_2;
  a_A_2: A_2 -> ; gamma_c_2*A_2;
  a_Ma_1_2: Ma_1_2 -> ; delta_ma_1_2*Ma_1_2;
  a_Ma_2: Ma_2 -> ; delta_ma_2*Ma_2;
  a_Mr_1_2: Mr_1_2 -> ; delta_mr_1_2*Mr_1_2;
  a_Mr_2: Mr_2 -> ; delta_mr_2*Mr_2;
  a_R_1_2: R_1_2 -> ; delta_r_1_2*R_1_2;
  a_R_2: R_2 -> ; delta_r_2*R_2;
  s_A1_1_2: Ma_1_2 -> A_1_2 + Ma_1_2; beta_a_1_2*Ma_1_2;
  s_A1_2: Ma_2 -> A_2 + Ma_2; beta_a_2*Ma_2;
  s_C_1_2: A_1_2 + R_1_2 -> C_1_2; gamma_c_1_2*A_1_2*R_1_2/vol;
  s_C_2: A_2 + R_2 -> C_2; gamma_c_2*A_2*R_2/vol;
  s_Da_1_2: Da_prime_1_2 -> Da_1_2; Theta_a_1_2*Da_prime_1_2;
  s_Da_2: Da_prime_2 -> Da_2; Theta_a_2*Da_prime_2;
  s_Da_prime_1_2: Da_1_2 + A_1_2 -> Da_prime_1_2; gamma_a_1_2*A_1_2*Da_1_2/vol;
  s_Da_prime_2: Da_2 + A_2 -> Da_prime_2; gamma_a_2*A_2*Da_2/vol;
  s_Dr_1_2: Dr_prime_1_2 -> Dr_1_2; Theta_r_1_2*Dr_prime_1_2;
  s_Dr_2: Dr_prime_2 -> Dr_2; Theta_r_2*Dr_prime_2;
  s_Dr_prime_1_2: Dr_1_2 + A_1_2 -> Dr_prime_1_2; gamma_r_1_2*A_1_2*Dr_1_2/vol;
  s_Dr_prime_2: Dr_2 + A_2 -> Dr_prime_2; gamma_r_2*A_2*Dr_2/vol;
  s_Ma1_1_2: Da_prime_1_2 -> Da_prime_1_2 + Ma_1_2; alpha_a_prime_1_2*Da_prime_1_2;
  s_Ma1_2: Da_prime_2 -> Da_prime_2 + Ma_2; alpha_a_prime_2*Da_prime_2;
  s_Ma2_1_2: Da_1_2 -> Da_1_2 + Ma_1_2; alpha_a_1_2*Da_1_2;
  s_Ma2_2: Da_2 -> Da_2 + Ma_2; alpha_a_2*Da_2;
  s_R1_1_2: Mr_1_2 -> Mr_1_2 + R_1_2; beta_r_1_2*Mr_1_2;
  s_R1_2: Mr_2 -> Mr_2 + R_2; beta_r_2*Mr_2;
  s_r2_1_2: C_1_2 -> R_1_2; delta_a_1_2*C_1_2;
  s_r2_2: C_2 -> R_2; delta_a_2*C_2;
  S_A2_1_2_3: Da_prime_1_2_3 -> Da_prime_1_2_3 + A_1_2_3; Theta_a_1_2_3*Da_prime_1_2_3;
  S_A2_1_3: Da_prime_1_3 -> Da_prime_1_3 + A_1_3; Theta_a_1_3*Da_prime_1_3;
  S_A2_2_3: Da_prime_2_3 -> Da_prime_2_3 + A_2_3; Theta_a_2_3*Da_prime_2_3;
  S_A2_3: Da_prime_3 -> Da_prime_3 + A_3; Theta_a_3*Da_prime_3;
  S_A3_1_2_3: Dr_prime_1_2_3 -> Dr_prime_1_2_3 + A_1_2_3; Theta_a_1_2_3*Dr_prime_1_2_3;
  S_A3_1_3: Dr_prime_1_3 -> Dr_prime_1_3 + A_1_3; Theta_a_1_3*Dr_prime_1_3;
  S_A3_2_3: Dr_prime_2_3 -> Dr_prime_2_3 + A_2_3; Theta_a_2_3*Dr_prime_2_3;
  S_A3_3: Dr_prime_3 -> Dr_prime_3 + A_3; Theta_a_3*Dr_prime_3;
  S_Mr1_1_2_3: Dr_prime_1_2_3 -> Dr_prime_1_2_3 + Mr_1_2_3; alpha_r_prime_1_2_3*Dr_prime_1_2_3;
  S_Mr1_1_3: Dr_prime_1_3 -> Dr_prime_1_3 + Mr_1_3; alpha_r_prime_1_3*Dr_prime_1_3;
  S_Mr1_2_3: Dr_prime_2_3 -> Dr_prime_2_3 + Mr_2_3; alpha_r_prime_2_3*Dr_prime_2_3;
  S_Mr1_3: Dr_prime_3 -> Dr_prime_3 + Mr_3; alpha_r_prime_3*Dr_prime_3;
  S_Mr2_1_2_3: Dr_1_2_3 -> Dr_1_2_3 + Mr_1_2_3; alpha_r_1_2_3*Dr_1_2_3;
  S_Mr2_1_3: Dr_1_3 -> Dr_1_3 + Mr_1_3; alpha_r_1_3*Dr_1_3;
  S_Mr2_2_3: Dr_2_3 -> Dr_2_3 + Mr_2_3; alpha_r_2_3*Dr_2_3;
  S_Mr2_3: Dr_3 -> Dr_3 + Mr_3; alpha_r_3*Dr_3;
  a_A_1_2_3: A_1_2_3 -> ; gamma_c_1_2_3*A_1_2_3;
  a_A_1_3: A_1_3 -> ; gamma_c_1_3*A_1_3;
  a_A_2_3: A_2_3 -> ; gamma_c_2_3*A_2_3;
  a_A_3: A_3 -> ; gamma_c_3*A_3;
  a_Ma_1_2_3: Ma_1_2_3 -> ; delta_ma_1_2_3*Ma_1_2_3;
  a_Ma_1_3: Ma_1_3 -> ; delta_ma_1_3*Ma_1_3;
  a_Ma_2_3: Ma_2_3 -> ; delta_ma_2_3*Ma_2_3;
  a_Ma_3: Ma_3 -> ; delta_ma_3*Ma_3;
  a_Mr_1_2_3: Mr_1_2_3 -> ; delta_mr_1_2_3*Mr_1_2_3;
  a_Mr_1_3: Mr_1_3 -> ; delta_mr_1_3*Mr_1_3;
  a_Mr_2_3: Mr_2_3 -> ; delta_mr_2_3*Mr_2_3;
  a_Mr_3: Mr_3 -> ; delta_mr_3*Mr_3;
  a_R_1_2_3: R_1_2_3 -> ; delta_r_1_2_3*R_1_2_3;
  a_R_1_3: R_1_3 -> ; delta_r_1_3*R_1_3;
  a_R_2_3: R_2_3 -> ; delta_r_2_3*R_2_3;
  a_R_3: R_3 -> ; delta_r_3*R_3;
  s_A1_1_2_3: Ma_1_2_3 -> A_1_2_3 + Ma_1_2_3; beta_a_1_2_3*Ma_1_2_3;
  s_A1_1_3: Ma_1_3 -> A_1_3 + Ma_1_3; beta_a_1_3*Ma_1_3;
  s_A1_2_3: Ma_2_3 -> A_2_3 + Ma_2_3; beta_a_2_3*Ma_2_3;
  s_A1_3: Ma_3 -> A_3 + Ma_3; beta_a_3*Ma_3;
  s_C_1_2_3: A_1_2_3 + R_1_2_3 -> C_1_2_3; gamma_c_1_2_3*A_1_2_3*R_1_2_3/vol;
  s_C_1_3: A_1_3 + R_1_3 -> C_1_3; gamma_c_1_3*A_1_3*R_1_3/vol;
  s_C_2_3: A_2_3 + R_2_3 -> C_2_3; gamma_c_2_3*A_2_3*R_2_3/vol;
  s_C_3: A_3 + R_3 -> C_3; gamma_c_3*A_3*R_3/vol;
  s_Da_1_2_3: Da_prime_1_2_3 -> Da_1_2_3; Theta_a_1_2_3*Da_prime_1_2_3;
  s_Da_1_3: Da_prime_1_3 -> Da_1_3; Theta_a_1_3*Da_prime_1_3;
  s_Da_2_3: Da_prime_2_3 -> Da_2_3; Theta_a_2_3*Da_prime_2_3;
  s_Da_3: Da_prime_3 -> Da_3; Theta_a_3*Da_prime_3;
  s_Da_prime_1_2_3: Da_1_2_3 + A_1_2_3 -> Da_prime_1_2_3; gamma_a_1_2_3*A_1_2_3*Da_1_2_3/vol;
  s_Da_prime_1_3: Da_1_3 + A_1_3 -> Da_prime_1_3; gamma_a_1_3*A_1_3*Da_1_3/vol;
  s_Da_prime_2_3: Da_2_3 + A_2_3 -> Da_prime_2_3; gamma_a_2_3*A_2_3*Da_2_3/vol;
  s_Da_prime_3: Da_3 + A_3 -> Da_prime_3; gamma_a_3*A_3*Da_3/vol;
  s_Dr_1_2_3: Dr_prime_1_2_3 -> Dr_1_2_3; Theta_r_1_2_3*Dr_prime_1_2_3;
  s_Dr_1_3: Dr_prime_1_3 -> Dr_1_3; Theta_r_1_3*Dr_prime_1_3;
  s_Dr_2_3: Dr_prime_2_3 -> Dr_2_3; Theta_r_2_3*Dr_prime_2_3;
  s_Dr_3: Dr_prime_3 -> Dr_3; Theta_r_3*Dr_prime_3;
  s_Dr_prime_1_2_3: Dr_1_2_3 + A_1_2_3 -> Dr_prime_1_2_3; gamma_r_1_2_3*A_1_2_3*Dr_1_2_3/vol;
  s_Dr_prime_1_3: Dr_1_3 + A_1_3 -> Dr_prime_1_3; gamma_r_1_3*A_1_3*Dr_1_3/vol;
  s_Dr_prime_2_3: Dr_2_3 + A_2_3 -> Dr_prime_2_3; gamma_r_2_3*A_2_3*Dr_2_3/vol;
  s_Dr_prime_3: Dr_3 + A_3 -> Dr_prime_3; gamma_r_3*A_3*Dr_3/vol;
  s_Ma1_1_2_3: Da_prime_1_2_3 -> Da_prime_1_2_3 + Ma_1_2_3; alpha_a_prime_1_2_3*Da_prime_1_2_3;
  s_Ma1_1_3: Da_prime_1_3 -> Da_prime_1_3 + Ma_1_3; alpha_a_prime_1_3*Da_prime_1_3;
  s_Ma1_2_3: Da_prime_2_3 -> Da_prime_2_3 + Ma_2_3; alpha_a_prime_2_3*Da_prime_2_3;
  s_Ma1_3: Da_prime_3 -> Da_prime_3 + Ma_3; alpha_a_prime_3*Da_prime_3;
  s_Ma2_1_2_3: Da_1_2_3 -> Da_1_2_3 + Ma_1_2_3; alpha_a_1_2_3*Da_1_2_3;
  s_Ma2_1_3: Da_1_3 -> Da_1_3 + Ma_1_3; alpha_a_1_3*Da_1_3;
  s_Ma2_2_3: Da_2_3 -> Da_2_3 + Ma_2_3; alpha_a_2_3*Da_2_3;
  s_Ma2_3: Da_3 -> Da_3 + Ma_3; alpha_a_3*Da_3;
  s_R1_1_2_3: Mr_1_2_3 -> Mr_1_2_3 + R_1_2_3; beta_r_1_2_3*Mr_1_2_3;
  s_R1_1_3: Mr_1_3 -> Mr_1_3 + R_1_3; beta_r_1_3*Mr_1_3;
  s_R1_2_3: Mr_2_3 -> Mr_2_3 + R_2_3; beta_r_2_3*Mr_2_3;
  s_R1_3: Mr_3 -> Mr_3 + R_3; beta_r_3*Mr_3;
  s_r2_1_2_3: C_1_2_3 -> R_1_2_3; delta_a_1_2_3*C_1_2_3;
  s_r2_1_3: C_1_3 -> R_1_3; delta_a_1_3*C_1_3;
  s_r2_2_3: C_2_3 -> R_2_3; delta_a_2_3*C_2_3;
  s_r2_3: C_3 -> R_3; delta_a_3*C_3;
  S_A2_1_2_3_4: Da_prime_1_2_3_4 -> Da_prime_1_2_3_4 + A_1_2_3_4; Theta_a_1_2_3_4*Da_prime_1_2_3_4;
  S_A2_1_2_4: Da_prime_1_2_4 -> Da_prime_1_2_4 + A_1_2_4; Theta_a_1_2_4*Da_prime_1_2_4;
  S_A2_1_3_4: Da_prime_1_3_4 -> Da_prime_1_3_4 + A_1_3_4; Theta_a_1_3_4*Da_prime_1_3_4;
  S_A2_1_4: Da_prime_1_4 -> Da_prime_1_4 + A_1_4; Theta_a_1_4*Da_prime_1_4;
  S_A2_2_3_4: Da_prime_2_3_4 -> Da_prime_2_3_4 + A_2_3_4; Theta_a_2_3_4*Da_prime_2_3_4;
  S_A2_2_4: Da_prime_2_4 -> Da_prime_2_4 + A_2_4; Theta_a_2_4*Da_prime_2_4;
  S_A2_3_4: Da_prime_3_4 -> Da_prime_3_4 + A_3_4; Theta_a_3_4*Da_prime_3_4;
  S_A2_4: Da_prime_4 -> Da_prime_4 + A_4; Theta_a_4*Da_prime_4;
  S_A3_1_2_3_4: Dr_prime_1_2_3_4 -> Dr_prime_1_2_3_4 + A_1_2_3_4; Theta_a_1_2_3_4*Dr_prime_1_2_3_4;
  S_A3_1_2_4: Dr_prime_1_2_4 -> Dr_prime_1_2_4 + A_1_2_4; Theta_a_1_2_4*Dr_prime_1_2_4;
  S_A3_1_3_4: Dr_prime_1_3_4 -> Dr_prime_1_3_4 + A_1_3_4; Theta_a_1_3_4*Dr_prime_1_3_4;
  S_A3_1_4: Dr_prime_1_4 -> Dr_prime_1_4 + A_1_4; Theta_a_1_4*Dr_prime_1_4;
  S_A3_2_3_4: Dr_prime_2_3_4 -> Dr_prime_2_3_4 + A_2_3_4; Theta_a_2_3_4*Dr_prime_2_3_4;
  S_A3_2_4: Dr_prime_2_4 -> Dr_prime_2_4 + A_2_4; Theta_a_2_4*Dr_prime_2_4;
  S_A3_3_4: Dr_prime_3_4 -> Dr_prime_3_4 + A_3_4; Theta_a_3_4*Dr_prime_3_4;
  S_A3_4: Dr_prime_4 -> Dr_prime_4 + A_4; Theta_a_4*Dr_prime_4;
  S_Mr1_1_2_3_4: Dr_prime_1_2_3_4 -> Dr_prime_1_2_3_4 + Mr_1_2_3_4; alpha_r_prime_1_2_3_4*Dr_prime_1_2_3_4;
  S_Mr1_1_2_4: Dr_prime_1_2_4 -> Dr_prime_1_2_4 + Mr_1_2_4; alpha_r_prime_1_2_4*Dr_prime_1_2_4;
  S_Mr1_1_3_4: Dr_prime_1_3_4 -> Dr_prime_1_3_4 + Mr_1_3_4; alpha_r_prime_1_3_4*Dr_prime_1_3_4;
  S_Mr1_1_4: Dr_prime_1_4 -> Dr_prime_1_4 + Mr_1_4; alpha_r_prime_1_4*Dr_prime_1_4;
  S_Mr1_2_3_4: Dr_prime_2_3_4 -> Dr_prime_2_3_4 + Mr_2_3_4; alpha_r_prime_2_3_4*Dr_prime_2_3_4;
  S_Mr1_2_4: Dr_prime_2_4 -> Dr_prime_2_4 + Mr_2_4; alpha_r_prime_2_4*Dr_prime_2_4;
  S_Mr1_3_4: Dr_prime_3_4 -> Dr_prime_3_4 + Mr_3_4; alpha_r_prime_3_4*Dr_prime_3_4;
  S_Mr1_4: Dr_prime_4 -> Dr_prime_4 + Mr_4; alpha_r_prime_4*Dr_prime_4;
  S_Mr2_1_2_3_4: Dr_1_2_3_4 -> Dr_1_2_3_4 + Mr_1_2_3_4; alpha_r_1_2_3_4*Dr_1_2_3_4;
  S_Mr2_1_2_4: Dr_1_2_4 -> Dr_1_2_4 + Mr_1_2_4; alpha_r_1_2_4*Dr_1_2_4;
  S_Mr2_1_3_4: Dr_1_3_4 -> Dr_1_3_4 + Mr_1_3_4; alpha_r_1_3_4*Dr_1_3_4;
  S_Mr2_1_4: Dr_1_4 -> Dr_1_4 + Mr_1_4; alpha_r_1_4*Dr_1_4;
  S_Mr2_2_3_4: Dr_2_3_4 -> Dr_2_3_4 + Mr_2_3_4; alpha_r_2_3_4*Dr_2_3_4;
  S_Mr2_2_4: Dr_2_4 -> Dr_2_4 + Mr_2_4; alpha_r_2_4*Dr_2_4;
  S_Mr2_3_4: Dr_3_4 -> Dr_3_4 + Mr_3_4; alpha_r_3_4*Dr_3_4;
  S_Mr2_4: Dr_4 -> Dr_4 + Mr_4; alpha_r_4*Dr_4;
  a_A_1_2_3_4: A_1_2_3_4 -> ; gamma_c_1_2_3_4*A_1_2_3_4;
  a_A_1_2_4: A_1_2_4 -> ; gamma_c_1_2_4*A_1_2_4;
  a_A_1_3_4: A_1_3_4 -> ; gamma_c_1_3_4*A_1_3_4;
  a_A_1_4: A_1_4 -> ; gamma_c_1_4*A_1_4;
  a_A_2_3_4: A_2_3_4 -> ; gamma_c_2_3_4*A_2_3_4;
  a_A_2_4: A_2_4 -> ; gamma_c_2_4*A_2_4;
  a_A_3_4: A_3_4 -> ; gamma_c_3_4*A_3_4;
  a_A_4: A_4 -> ; gamma_c_4*A_4;
  a_Ma_1_2_3_4: Ma_1_2_3_4 -> ; delta_ma_1_2_3_4*Ma_1_2_3_4;
  a_Ma_1_2_4: Ma_1_2_4 -> ; delta_ma_1_2_4*Ma_1_2_4;
  a_Ma_1_3_4: Ma_1_3_4 -> ; delta_ma_1_3_4*Ma_1_3_4;
  a_Ma_1_4: Ma_1_4 -> ; delta_ma_1_4*Ma_1_4;
  a_Ma_2_3_4: Ma_2_3_4 -> ; delta_ma_2_3_4*Ma_2_3_4;
  a_Ma_2_4: Ma_2_4 -> ; delta_ma_2_4*Ma_2_4;
  a_Ma_3_4: Ma_3_4 -> ; delta_ma_3_4*Ma_3_4;
  a_Ma_4: Ma_4 -> ; delta_ma_4*Ma_4;
  a_Mr_1_2_3_4: Mr_1_2_3_4 -> ; delta_mr_1_2_3_4*Mr_1_2_3_4;
  a_Mr_1_2_4: Mr_1_2_4 -> ; delta_mr_1_2_4*Mr_1_2_4;
  a_Mr_1_3_4: Mr_1_3_4 -> ; delta_mr_1_3_4*Mr_1_3_4;
  a_Mr_1_4: Mr_1_4 -> ; delta_mr_1_4*Mr_1_4;
  a_Mr_2_3_4: Mr_2_3_4 -> ; delta_mr_2_3_4*Mr_2_3_4;
  a_Mr_2_4: Mr_2_4 -> ; delta_mr_2_4*Mr_2_4;
  a_Mr_3_4: Mr_3_4 -> ; delta_mr_3_4*Mr_3_4;
  a_Mr_4: Mr_4 -> ; delta_mr_4*Mr_4;
  a_R_1_2_3_4: R_1_2_3_4 -> ; delta_r_1_2_3_4*R_1_2_3_4;
  a_R_1_2_4: R_1_2_4 -> ; delta_r_1_2_4*R_1_2_4;
  a_R_1_3_4: R_1_3_4 -> ; delta_r_1_3_4*R_1_3_4;
  a_R_1_4: R_1_4 -> ; delta_r_1_4*R_1_4;
  a_R_2_3_4: R_2_3_4 -> ; delta_r_2_3_4*R_2_3_4;
  a_R_2_4: R_2_4 -> ; delta_r_2_4*R_2_4;
  a_R_3_4: R_3_4 -> ; delta_r_3_4*R_3_4;
  a_R_4: R_4 -> ; delta_r_4*R_4;
  s_A1_1_2_3_4: Ma_1_2_3_4 -> A_1_2_3_4 + Ma_1_2_3_4; beta_a_1_2_3_4*Ma_1_2_3_4;
  s_A1_1_2_4: Ma_1_2_4 -> A_1_2_4 + Ma_1_2_4; beta_a_1_2_4*Ma_1_2_4;
  s_A1_1_3_4: Ma_1_3_4 -> A_1_3_4 + Ma_1_3_4; beta_a_1_3_4*Ma_1_3_4;
  s_A1_1_4: Ma_1_4 -> A_1_4 + Ma_1_4; beta_a_1_4*Ma_1_4;
  s_A1_2_3_4: Ma_2_3_4 -> A_2_3_4 + Ma_2_3_4; beta_a_2_3_4*Ma_2_3_4;
  s_A1_2_4: Ma_2_4 -> A_2_4 + Ma_2_4; beta_a_2_4*Ma_2_4;
  s_A1_3_4: Ma_3_4 -> A_3_4 + Ma_3_4; beta_a_3_4*Ma_3_4;
  s_A1_4: Ma_4 -> A_4 + Ma_4; beta_a_4*Ma_4;
  s_C_1_2_3_4: A_1_2_3_4 + R_1_2_3_4 -> C_1_2_3_4; gamma_c_1_2_3_4*A_1_2_3_4*R_1_2_3_4/vol;
  s_C_1_2_4: A_1_2_4 + R_1_2_4 -> C_1_2_4; gamma_c_1_2_4*A_1_2_4*R_1_2_4/vol;
  s_C_1_3_4: A_1_3_4 + R_1_3_4 -> C_1_3_4; gamma_c_1_3_4*A_1_3_4*R_1_3_4/vol;
  s_C_1_4: A_1_4 + R_1_4 -> C_1_4; gamma_c_1_4*A_1_4*R_1_4/vol;
  s_C_2_3_4: A_2_3_4 + R_2_3_4 -> C_2_3_4; gamma_c_2_3_4*A_2_3_4*R_2_3_4/vol;
  s_C_2_4: A_2_4 + R_2_4 -> C_2_4; gamma_c_2_4*A_2_4*R_2_4/vol;
  s_C_3_4: A_3_4 + R_3_4 -> C_3_4; gamma_c_3_4*A_3_4*R_3_4/vol;
  s_C_4: A_4 + R_4 -> C_4; gamma_c_4*A_4*R_4/vol;
  s_Da_1_2_3_4: Da_prime_1_2_3_4 -> Da_1_2_3_4; Theta_a_1_2_3_4*Da_prime_1_2_3_4;
  s_Da_1_2_4: Da_prime_1_2_4 -> Da_1_2_4; Theta_a_1_2_4*Da_prime_1_2_4;
  s_Da_1_3_4: Da_prime_1_3_4 -> Da_1_3_4; Theta_a_1_3_4*Da_prime_1_3_4;
  s_Da_1_4: Da_prime_1_4 -> Da_1_4; Theta_a_1_4*Da_prime_1_4;
  s_Da_2_3_4: Da_prime_2_3_4 -> Da_2_3_4; Theta_a_2_3_4*Da_prime_2_3_4;
  s_Da_2_4: Da_prime_2_4 -> Da_2_4; Theta_a_2_4*Da_prime_2_4;
  s_Da_3_4: Da_prime_3_4 -> Da_3_4; Theta_a_3_4*Da_prime_3_4;
  s_Da_4: Da_prime_4 -> Da_4; Theta_a_4*Da_prime_4;
  s_Da_prime_1_2_3_4: Da_1_2_3_4 + A_1_2_3_4 -> Da_prime_1_2_3_4; gamma_a_1_2_3_4*A_1_2_3_4*Da_1_2_3_4/vol;
  s_Da_prime_1_2_4: Da_1_2_4 + A_1_2_4 -> Da_prime_1_2_4; gamma_a_1_2_4*A_1_2_4*Da_1_2_4/vol;
  s_Da_prime_1_3_4: Da_1_3_4 + A_1_3_4 -> Da_prime_1_3_4; gamma_a_1_3_4*A_1_3_4*Da_1_3_4/vol;
  s_Da_prime_1_4: Da_1_4 + A_1_4 -> Da_prime_1_4; gamma_a_1_4*A_1_4*Da_1_4/vol;
  s_Da_prime_2_3_4: Da_2_3_4 + A_2_3_4 -> Da_prime_2_3_4; gamma_a_2_3_4*A_2_3_4*Da_2_3_4/vol;
  s_Da_prime_2_4: Da_2_4 + A_2_4 -> Da_prime_2_4; gamma_a_2_4*A_2_4*Da_2_4/vol;
  s_Da_prime_3_4: Da_3_4 + A_3_4 -> Da_prime_3_4; gamma_a_3_4*A_3_4*Da_3_4/vol;
  s_Da_prime_4: Da_4 + A_4 -> Da_prime_4; gamma_a_4*A_4*Da_4/vol;
  s_Dr_1_2_3_4: Dr_prime_1_2_3_4 -> Dr_1_2_3_4; Theta_r_1_2_3_4*Dr_prime_1_2_3_4;
  s_Dr_1_2_4: Dr_prime_1_2_4 -> Dr_1_2_4; Theta_r_1_2_4*Dr_prime_1_2_4;
  s_Dr_1_3_4: Dr_prime_1_3_4 -> Dr_1_3_4; Theta_r_1_3_4*Dr_prime_1_3_4;
  s_Dr_1_4: Dr_prime_1_4 -> Dr_1_4; Theta_r_1_4*Dr_prime_1_4;
  s_Dr_2_3_4: Dr_prime_2_3_4 -> Dr_2_3_4; Theta_r_2_3_4*Dr_prime_2_3_4;
  s_Dr_2_4: Dr_prime_2_4 -> Dr_2_4; Theta_r_2_4*Dr_prime_2_4;
  s_Dr_3_4: Dr_prime_3_4 -> Dr_3_4; Theta_r_3_4*Dr_prime_3_4;
  s_Dr_4: Dr_prime_4 -> Dr_4; Theta_r_4*Dr_prime_4;
  s_Dr_prime_1_2_3_4: Dr_1_2_3_4 + A_1_2_3_4 -> Dr_prime_1_2_3_4; gamma_r_1_2_3_4*A_1_2_3_4*Dr_1_2_3_4/vol;
  s_Dr_prime_1_2_4: Dr_1_2_4 + A_1_2_4 -> Dr_prime_1_2_4; gamma_r_1_2_4*A_1_2_4*Dr_1_2_4/vol;
  s_Dr_prime_1_3_4: Dr_1_3_4 + A_1_3_4 -> Dr_prime_1_3_4; gamma_r_1_3_4*A_1_3_4*Dr_1_3_4/vol;
  s_Dr_prime_1_4: Dr_1_4 + A_1_4 -> Dr_prime_1_4; gamma_r_1_4*A_1_4*Dr_1_4/vol;
  s_Dr_prime_2_3_4: Dr_2_3_4 + A_2_3_4 -> Dr_prime_2_3_4; gamma_r_2_3_4*A_2_3_4*Dr_2_3_4/vol;
  s_Dr_prime_2_4: Dr_2_4 + A_2_4 -> Dr_prime_2_4; gamma_r_2_4*A_2_4*Dr_2_4/vol;
  s_Dr_prime_3_4: Dr_3_4 + A_3_4 -> Dr_prime_3_4; gamma_r_3_4*A_3_4*Dr_3_4/vol;
  s_Dr_prime_4: Dr_4 + A_4 -> Dr_prime_4; gamma_r_4*A_4*Dr_4/vol;
  s_Ma1_1_2_3_4: Da_prime_1_2_3_4 -> Da_prime_1_2_3_4 + Ma_1_2_3_4; alpha_a_prime_1_2_3_4*Da_prime_1_2_3_4;
  s_Ma1_1_2_4: Da_prime_1_2_4 -> Da_prime_1_2_4 + Ma_1_2_4; alpha_a_prime_1_2_4*Da_prime_1_2_4;
  s_Ma1_1_3_4: Da_prime_1_3_4 -> Da_prime_1_3_4 + Ma_1_3_4; alpha_a_prime_1_3_4*Da_prime_1_3_4;
  s_Ma1_1_4: Da_prime_1_4 -> Da_prime_1_4 + Ma_1_4; alpha_a_prime_1_4*Da_prime_1_4;
  s_Ma1_2_3_4: Da_prime_2_3_4 -> Da_prime_2_3_4 + Ma_2_3_4; alpha_a_prime_2_3_4*Da_prime_2_3_4;
  s_Ma1_2_4: Da_prime_2_4 -> Da_prime_2_4 + Ma_2_4; alpha_a_prime_2_4*Da_prime_2_4;
  s_Ma1_3_4: Da_prime_3_4 -> Da_prime_3_4 + Ma_3_4; alpha_a_prime_3_4*Da_prime_3_4;
  s_Ma1_4: Da_prime_4 -> Da_prime_4 + Ma_4; alpha_a_prime_4*Da_prime_4;
  s_Ma2_1_2_3_4: Da_1_2_3_4 -> Da_1_2_3_4 + Ma_1_2_3_4; alpha_a_1_2_3_4*Da_1_2_3_4;
  s_Ma2_1_2_4: Da_1_2_4 -> Da_1_2_4 + Ma_1_2_4; alpha_a_1_2_4*Da_1_2_4;
  s_Ma2_1_3_4: Da_1_3_4 -> Da_1_3_4 + Ma_1_3_4; alpha_a_1_3_4*Da_1_3_4;
  s_Ma2_1_4: Da_1_4 -> Da_1_4 + Ma_1_4; alpha_a_1_4*Da_1_4;
  s_Ma2_2_3_4: Da_2_3_4 -> Da_2_3_4 + Ma_2_3_4; alpha_a_2_3_4*Da_2_3_4;
  s_Ma2_2_4: Da_2_4 -> Da_2_4 + Ma_2_4; alpha_a_2_4*Da_2_4;
  s_Ma2_3_4: Da_3_4 -> Da_3_4 + Ma_3_4; alpha_a_3_4*Da_3_4;
  s_Ma2_4: Da_4 -> Da_4 + Ma_4; alpha_a_4*Da_4;
  s_R1_1_2_3_4: Mr_1_2_3_4 -> Mr_1_2_3_4 + R_1_2_3_4; beta_r_1_2_3_4*Mr_1_2_3_4;
  s_R1_1_2_4: Mr_1_2_4 -> Mr_1_2_4 + R_1_2_4; beta_r_1_2_4*Mr_1_2_4;
  s_R1_1_3_4: Mr_1_3_4 -> Mr_1_3_4 + R_1_3_4; beta_r_1_3_4*Mr_1_3_4;
  s_R1_1_4: Mr_1_4 -> Mr_1_4 + R_1_4; beta_r_1_4*Mr_1_4;
  s_R1_2_3_4: Mr_2_3_4 -> Mr_2_3_4 + R_2_3_4; beta_r_2_3_4*Mr_2_3_4;
  s_R1_2_4: Mr_2_4 -> Mr_2_4 + R_2_4; beta_r_2_4*Mr_2_4;
  s_R1_3_4: Mr_3_4 -> Mr_3_4 + R_3_4; beta_r_3_4*Mr_3_4;
  s_R1_4: Mr_4 -> Mr_4 + R_4; beta_r_4*Mr_4;
  s_r2_1_2_3_4: C_1_2_3_4 -> R_1_2_3_4; delta_a_1_2_3_4*C_1_2_3_4;
  s_r2_1_2_4: C_1_2_4 -> R_1_2_4; delta_a_1_2_4*C_1_2_4;
  s_r2_1_3_4: C_1_3_4 -> R_1_3_4; delta_a_1_3_4*C_1_3_4;
  s_r2_1_4: C_1_4 -> R_1_4; delta_a_1_4*C_1_4;
  s_r2_2_3_4: C_2_3_4 -> R_2_3_4; delta_a_2_3_4*C_2_3_4;
  s_r2_2_4: C_2_4 -> R_2_4; delta_a_2_4*C_2_4;
  s_r2_3_4: C_3_4 -> R_3_4; delta_a_3_4*C_3_4;
  s_r2_4: C_4 -> R_4; delta_a_4*C_4;
end
